/TITLE, ANSYS
! Created by: JP and DRE

/clear,nostart
/PREP7

! Element type: ET, type #, name
ET, 1, PLANE222
! Setting thermal structural analysis in keyopt
KEYOPT,	1,	1,	11

! Nodal coordinates: 'N', node_id, x-coord, y-coord, z-coord
N,	1,	0,	0,	0
N,	2,	0,	1,	0
N,	3,	0,	2,	0
N,	4,	0,	3,	0
N,	5,	0,	4,	0
N,	6,	1,	0,	0
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N,	55,	10,	4,	0

! Element connectivity: 'EN', element_id,  node_ids
! Material:             'MP', property_id, material_id, value
! Custom property:      'R',  property_id, value
! Material 1
MP,	EX,  	1,	1
MP,	PRXY,	1,	0.3
MP,	DENS,	1,	1000
MP, KXX,	1,	20
MP,	CTEX, 	1, 	1
R, 	1,	1

MAT,1
! Connectivity
EN,	1	,1	,6	,7	,2
EN,	2	,2	,7	,8	,3
EN,	3	,3	,8	,9	,4
EN,	4	,4	,9	,10	,5
EN,	5	,6	,11	,12	,7
EN,	6	,7	,12	,13	,8
EN,	7	,8	,13	,14	,9
EN,	8	,9	,14	,15	,10
EN,	9	,11	,16	,17	,12
EN,	10	,12	,17	,18	,13
EN,	11	,13	,18	,19	,14
EN,	12	,14	,19	,20	,15
EN,	13	,16	,21	,22	,17
EN,	14	,17	,22	,23	,18
EN,	15	,18	,23	,24	,19
EN,	16	,19	,24	,25	,20
EN,	17	,21	,26	,27	,22
EN,	18	,22	,27	,28	,23
EN,	19	,23	,28	,29	,24
EN,	20	,24	,29	,30	,25
EN,	21	,26	,31	,32	,27
EN,	22	,27	,32	,33	,28
EN,	23	,28	,33	,34	,29
EN,	24	,29	,34	,35	,30
EN,	25	,31	,36	,37	,32
EN,	26	,32	,37	,38	,33
EN,	27	,33	,38	,39	,34
EN,	28	,34	,39	,40	,35
EN,	29	,36	,41	,42	,37
EN,	30	,37	,42	,43	,38
EN,	31	,38	,43	,44	,39
EN,	32	,39	,44	,45	,40
EN,	33	,41	,46	,47	,42
EN,	34	,42	,47	,48	,43
EN,	35	,43	,48	,49	,44
EN,	36	,44	,49	,50	,45
EN,	37	,46	,51	,52	,47
EN,	38	,47	,52	,53	,48
EN,	39	,48	,53	,54	,49
EN,	40	,49	,54	,55	,50

! Nodal temperature: 'T', node_id, TEMP, value
!D,	1,	TEMP,	100
!D,	2,	TEMP,	100
!D,	3,	TEMP,	100
!D,	4,	TEMP,	100
!D,	5,	TEMP,	100
!D,	51,	TEMP,	10
!D,	52,	TEMP,	10
!D,	53,	TEMP,	10
!D,	54,	TEMP,	10
!D,	55,	TEMP,	10

D,	5, UX, 0
D,	4, UX, 0
D,	3, UX, 0
D,	2, UX, 0
D,	1, UX, 0

D,	1, UY, 0
D,	6, UY, 0
D,	11, UY, 0
D,	16, UY, 0
D,	21, UY, 0
D,	26, UY, 0
D,	31, UY, 0
D,	36, UY, 0
D,	41, UY, 0
D,	46, UY, 0
D,	51, UY, 0

! VIRKER IKKE
!SFE,	4,	4,	CONV,	100,,	100
!SFE,	3,	4,	CONV,	100,,	100
!SFE,	2,	4,	CONV,	100,,	100
!SFE,	1,	4,	CONV,	100,,	100

!SFE,	40,	2,	CONV,	100,,	10
!SFE,	39,	2,	CONV,	100,,	10
!SFE,	38,	2,	CONV,	100,,	10
!SFE,	37,	2,	CONV,	100,,	10


FINISH
/SOL
!ANTYPE,0
SOLVE
FINISH


/POST1
PRNSOL,TEMP
PLNSOL, TEMP,, 1
