/PREP7
/TITLE,
ET,        1,plane42
R,     1,  1.00000000    ,  0.00000000    ,  0.00000000    ,  0.00000000    ,  0.00000000    ,  0.00000000
N,     1,  0.00000000    ,  0.00000000    ,  0.00000000    ,  0.00000000    ,  0.00000000    ,  0.00000000
N,     2,  1.00000000    ,  0.00000000    ,  0.00000000    ,  0.00000000    ,  0.00000000    ,  0.00000000
N,     3, 0.500000000E-01,  0.00000000    ,  0.00000000    ,  0.00000000    ,  0.00000000    ,  0.00000000
N,     4, 0.100000000    ,  0.00000000    ,  0.00000000    ,  0.00000000    ,  0.00000000    ,  0.00000000
N,     5, 0.150000000    ,  0.00000000    ,  0.00000000    ,  0.00000000    ,  0.00000000    ,  0.00000000
N,     6, 0.200000000    ,  0.00000000    ,  0.00000000    ,  0.00000000    ,  0.00000000    ,  0.00000000
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N,   411, 0.431711664    , 0.462063651    ,  0.00000000    ,  0.00000000    ,  0.00000000    ,  0.00000000

! Mat props
MP,EX,     1,   1.00000000
MP,DENS,     1,   1000.00000
MP,KXX,     1,   1.00000000
MP,PRXY,     1,  0.300000000
MP,CTEX,	1, 1


EN,      1,    408,    411,    401,     87
EN,      2,     87,    404,    407,    408
EN,      3,    393,    404,     87,    396
EN,      4,    396,     87,    401,    398
EN,      5,    411,    410,    400,    401
EN,      6,    347,    348,     89,     88
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EN,    367,     46,     42,     54,     97
MP,EX,     1,   1.00000000
MP,DENS,     1,   1000.00000
MP,KXX,     1,   1.00000000
MP,PRXY,     1,  0.300000000
ACEL,  0.00000000    ,  0.00000000    ,  0.00000000
D,     1,UX,  0.00000000
D,     1,UY,  0.00000000
D,     2,UY,  0.00000000
D,     3,UY,  0.00000000
D,     4,UY,  0.00000000
D,     5,UY,  0.00000000
D,     6,UY,  0.00000000
D,     7,UY,  0.00000000
D,     8,UY,  0.00000000
D,     9,UY,  0.00000000
D,    10,UY,  0.00000000
D,    11,UY,  0.00000000
D,    12,UY,  0.00000000
D,    13,UY,  0.00000000
D,    14,UY,  0.00000000
D,    15,UY,  0.00000000
D,    16,UY,  0.00000000
D,    17,UY,  0.00000000
D,    18,UY,  0.00000000
D,    19,UY,  0.00000000
D,    20,UY,  0.00000000
D,    21,UY,  0.00000000
D,    63,UX,  0.00000000
D,    68,UX,  0.00000000
D,    69,UX,  0.00000000
D,    70,UX,  0.00000000
D,    71,UX,  0.00000000
D,    72,UX,  0.00000000
D,    73,UX,  0.00000000
D,    74,UX,  0.00000000
D,    75,UX,  0.00000000
D,    76,UX,  0.00000000
D,    77,UX,  0.00000000
D,    78,UX,  0.00000000
D,    79,UX,  0.00000000
D,    80,UX,  0.00000000
D,    81,UX,  0.00000000
D,    82,UX,  0.00000000
D,    83,UX,  0.00000000
D,    84,UX,  0.00000000
D,    85,UX,  0.00000000
D,    86,UX,  0.00000000
SPC,   306,     2,CONV,0,  25.0000000    ,  500.000000
SPC,   307,     2,CONV,0,  25.0000000    ,  500.000000
SPC,   308,     2,CONV,0,  25.0000000    ,  500.000000
SPC,   309,     2,CONV,0,  25.0000000    ,  500.000000
SPC,   328,     2,CONV,0,  25.0000000    ,  500.000000
SPC,   329,     2,CONV,0,  25.0000000    ,  500.000000
SPC,   330,     2,CONV,0,  25.0000000    ,  500.000000
SPC,   331,     2,CONV,0,  25.0000000    ,  200.000000
SPC,   332,     2,CONV,0,  25.0000000    ,  200.000000
SPC,   333,     2,CONV,0,  25.0000000    ,  200.000000
SPC,   334,     2,CONV,0,  25.0000000    ,  200.000000
SPC,   335,     2,CONV,0,  25.0000000    ,  200.000000
SPC,   336,     2,CONV,0,  25.0000000    ,  200.000000
SPC,   337,     2,CONV,0,  25.0000000    ,  200.000000
SPC,   338,     2,CONV,0,  25.0000000    ,  200.000000
SPC,   339,     2,CONV,0,  25.0000000    ,  200.000000
SPC,   340,     2,CONV,0,  25.0000000    ,  200.000000
SPC,   341,     2,CONV,0,  25.0000000    ,  200.000000
SPC,   342,     2,CONV,0,  25.0000000    ,  200.000000
SPC,   343,     2,CONV,0,  25.0000000    ,  200.000000
SPC,   344,     2,CONV,0,  25.0000000    ,  200.000000
SPC,   345,     2,CONV,0,  25.0000000    ,  200.000000
SPC,   346,     2,CONV,0,  25.0000000    ,  200.000000
SPC,   347,     2,CONV,0,  25.0000000    ,  200.000000
SPC,   348,     2,CONV,0,  25.0000000    ,  200.000000
SPC,   349,     3,CONV,0,  25.0000000    ,  200.000000
SPC,   350,     2,CONV,0,  25.0000000    ,  200.000000
SPC,   350,     3,CONV,0,  25.0000000    ,  500.000000
SPC,   352,     2,CONV,0,  25.0000000    ,  500.000000
SPC,   353,     2,CONV,0,  25.0000000    ,  500.000000
SPC,   354,     2,CONV,0,  25.0000000    ,  500.000000
SPC,   355,     2,CONV,0,  25.0000000    ,  500.000000
SPC,   356,     2,CONV,0,  25.0000000    ,  500.000000
SPC,   357,     2,CONV,0,  25.0000000    ,  500.000000
SPC,   358,     2,CONV,0,  25.0000000    ,  500.000000
SPC,   358,     3,CONV,0,  25.0000000    ,  500.000000
SPC,   359,     2,CONV,0,  25.0000000    ,  500.000000
SPC,   360,     2,CONV,0,  25.0000000    ,  500.000000
SPC,   361,     2,CONV,0,  25.0000000    ,  500.000000
SPC,   362,     2,CONV,0,  25.0000000    ,  500.000000
SPC,   363,     2,CONV,0,  25.0000000    ,  500.000000
SPC,   364,     2,CONV,0,  25.0000000    ,  500.000000
SPC,   365,     2,CONV,0,  25.0000000    ,  500.000000
SPC,   366,     2,CONV,0,  25.0000000    ,  500.000000
SPC,   367,     1,CONV,0,  25.0000000    ,  500.000000
SPC,   367,     2,CONV,0,  25.0000000    ,  500.000000
FINISH

/SOLU
antype, thermstat
FINISH
