/PREP7
/TITLE,
ET, 1, PLANE42, , , 3
R,     1,  1.00000000    ,  0.00000000    ,  0.00000000    ,  0.00000000    ,  0.00000000    ,  0.00000000
N,     1,  5.57551696    ,  8.08424279    ,  0.00000000    ,  0.00000000    ,  0.00000000    ,  0.00000000
N,     2,  6.36050914    ,  7.94297971    ,  0.00000000    ,  0.00000000    ,  0.00000000    ,  0.00000000
N,     3,  5.97611524    ,  8.05927064    ,  0.00000000    ,  0.00000000    ,  0.00000000    ,  0.00000000
N,     4,  5.97504149    ,  8.05345325    ,  0.00000000    ,  0.00000000    ,  0.00000000    ,  0.00000000
N,     5,  5.16050914    ,  2.42049927    ,  0.00000000    ,  0.00000000    ,  0.00000000    ,  0.00000000
N,     6,  5.16050914    ,  3.71610687    ,  0.00000000    ,  0.00000000    ,  0.00000000    ,  0.00000000
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N,   191,  6.36099809    ,  5.52678348    ,  0.00000000    ,  0.00000000    ,  0.00000000    ,  0.00000000
MAT,     1
EN,      1,      2,      3,      4,      4
EN,      2,      1,      4,      3,      3
EN,      3,      5,     12,     13,      7
EN,      4,     12,     10,     11,     13
EN,      5,      7,     13,      9,      6
EN,      6,     13,     11,      8,      9
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EN,     36,     50,     56,     51,     49
MAT,     2
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EN,     69,     91,     93,     49,     51
MAT,     1
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EN,    103,    144,    145,      1,      3
MAT,     2
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EN,    134,    166,    179,      1,    121

MP,EX,     1,   1.010000
MP,KXX,     1,   1.1000000
MP,PRXY,     1,  0.300000000
MP,CTEX,  1, 	3.5e-6
MP,EX,     2,   3.50000000
MP,KXX,     2,   1.1000000
MP,PRXY,     2,  0.300000000
MP,CTEX, 	2, 	1.1e-6

T,     1,TEMP,  100.000000
T,     2,TEMP,  100.000000
T,     3,TEMP,  100.000000
T,     4,TEMP,  100.000000
T,     5,TEMP,  100.000000
T,     6,TEMP,  100.000000
T,     7,TEMP,  100.000000
T,     8,TEMP,  100.000000
T,     9,TEMP,  100.000000
T,    10,TEMP,  100.000000
T,    11,TEMP,  100.000000
T,    12,TEMP,  100.000000
T,    13,TEMP,  100.000000
T,    14,TEMP,  100.000000
T,    15,TEMP,  100.000000
T,    16,TEMP,  100.000000
T,    17,TEMP,  100.000000
T,    18,TEMP,  100.000000
T,    19,TEMP,  100.000000
T,    20,TEMP,  100.000000
T,    21,TEMP,  100.000000
T,    22,TEMP,  100.000000
D,    23,UY,  0.00000000
T,    23,TEMP,  100.000000
D,    24,UY,  0.00000000
T,    24,TEMP,  100.000000
D,    25,UY,  0.00000000
T,    25,TEMP,  100.000000
T,    26,TEMP,  100.000000
T,    27,TEMP,  100.000000
T,    28,TEMP,  100.000000
T,    29,TEMP,  100.000000
T,    30,TEMP,  100.000000
T,    31,TEMP,  100.000000
T,    32,TEMP,  100.000000
T,    33,TEMP,  100.000000
T,    34,TEMP,  100.000000
T,    35,TEMP,  100.000000
T,    36,TEMP,  100.000000
T,    37,TEMP,  100.000000
T,    38,TEMP,  100.000000
T,    39,TEMP,  100.000000
T,    40,TEMP,  100.000000
T,    41,TEMP,  100.000000
D,    42,UX,  0.00000000
T,    42,TEMP,  100.000000
T,    43,TEMP,  100.000000
T,    44,TEMP,  100.000000
T,    45,TEMP,  100.000000
T,    46,TEMP,  100.000000
T,    47,TEMP,  100.000000
T,    48,TEMP,  100.000000
D,    49,UX,  0.00000000
T,    49,TEMP,  100.000000
D,    50,UX,  0.00000000
T,    50,TEMP,  100.000000
T,    51,TEMP,  100.000000
T,    52,TEMP,  100.000000
T,    53,TEMP,  100.000000
T,    54,TEMP,  100.000000
T,    55,TEMP,  100.000000
T,    56,TEMP,  100.000000
T,    57,TEMP,  100.000000
T,    58,TEMP,  100.000000
T,    59,TEMP,  100.000000
T,    60,TEMP,  100.000000
T,    61,TEMP,  100.000000
T,    62,TEMP,  100.000000
T,    63,TEMP,  100.000000
T,    64,TEMP,  100.000000
T,    65,TEMP,  100.000000
T,    66,TEMP,  100.000000
T,    67,TEMP,  100.000000
T,    68,TEMP,  100.000000
T,    69,TEMP,  100.000000
T,    70,TEMP,  100.000000
T,    71,TEMP,  100.000000
T,    72,TEMP,  100.000000
T,    73,TEMP,  100.000000
T,    74,TEMP,  100.000000
D,    75,UY,  0.00000000
T,    75,TEMP,  100.000000
D,    76,UY,  0.00000000
T,    76,TEMP,  100.000000
D,    77,UY,  0.00000000
T,    77,TEMP,  100.000000
D,    78,UY,  0.00000000
T,    78,TEMP,  100.000000
D,    79,UY,  0.00000000
T,    79,TEMP,  100.000000
D,    80,UY,  0.00000000
T,    80,TEMP,  100.000000
D,    81,UY,  0.00000000
T,    81,TEMP,  100.000000
D,    82,UY,  0.00000000
T,    82,TEMP,  100.000000
D,    83,UY,  0.00000000
T,    83,TEMP,  100.000000
T,    84,TEMP,  100.000000
T,    85,TEMP,  100.000000
T,    86,TEMP,  100.000000
T,    87,TEMP,  100.000000
T,    88,TEMP,  100.000000
T,    89,TEMP,  100.000000
T,    90,TEMP,  100.000000
T,    91,TEMP,  100.000000
D,    92,UX,  0.00000000
T,    92,TEMP,  100.000000
D,    93,UX,  0.00000000
T,    93,TEMP,  100.000000
D,    94,UX,  0.00000000
T,    94,TEMP,  100.000000
D,    95,UX,  0.00000000
T,    95,TEMP,  100.000000
D,    96,UX,  0.00000000
T,    96,TEMP,  100.000000
D,    97,UX,  0.00000000
T,    97,TEMP,  100.000000
D,    98,UX,  0.00000000
T,    98,TEMP,  100.000000
D,    99,UX,  0.00000000
T,    99,TEMP,  100.000000
D,   100,UX,  0.00000000

FINISH

/SOLU
antype, thermstat
FINISH
